# OpenSim document version 40000
MarkerSet:
  Marker Hand_Start: radius (-0.007888891 -0.2183006 0.0605412) fixed=true
  Marker Hand_Thumb3: Tphalanx1 (-0.01232309 -0.04115871 0.02236647) fixed=true
  Marker Hand_ThumbTip: Tphalanx2 (-0.00476197 -0.03422397 0.0122766) fixed=true
  Marker Hand_Index1: metacarpal2 (-0.003912876 -0.07630249 0.04404868) fixed=true
  Marker Hand_Thumb2: thumb (0.004341501 -0.04206419 0.0402541)
  Marker Hand_Ring2: Rphalanx1 (0.003142438 -0.06008199 0.004378501) fixed=true
  Marker Hand_Middle1: metacarpal3 (-0.004974643 -0.08395534 0.01441823) fixed=true
  Marker Hand_Pinky1: metacarpal5 (3.89163e-5 -0.06949306 -0.03664787) fixed=true
  Marker Hand_Index2: Iphalanx1 (0.001600166 -0.05465069 0.008290837) fixed=true
  Marker Hand_Index3: Iphalanx2 (0.0009978502 -0.03642282 0.003615753) fixed=true
  Marker Hand_IndexTip: Iphalanx3 (0.002097341 -0.02319192 0.003480245) fixed=true
  Marker Hand_Middle3: Mphalanx2 (0.004073992 -0.03843471 0.0065951) fixed=true
  Marker Hand_MiddleTip: Mphalanx3 (0.002637237 -0.02726816 0.006309925) fixed=true
  Marker Hand_Middle2: Mphalanx1 (0.001335462 -0.0597819 0.008055302) fixed=true
  Marker Hand_Ring3: Rphalanx2 (0.006638035 -0.03640424 -0.002044995) fixed=true
  Marker Hand_RingTip: Rphalanx3 (0.003081676 -0.02556288 0.001058819) fixed=true
  Marker Hand_Ring1: metacarpal4 (-0.002449906 -0.08559839 -0.007913776) fixed=true
  Marker Hand_Pinky2: Lphalanx1 (0.001909019 -0.04797333 0.001019529) fixed=true
  Marker Hand_PinkyTip: Lphalanx3 (-0.001311813 -0.02293506 0.007476949) fixed=true
  Marker Hand_Pinky3: Lphalanx2 (0.0008064064 -0.03101024 0.01001313) fixed=true
  Marker Hand_Thumb1: trapezium (-0.001042947 -0.001949986 0.002379972) fixed=true
