# OpenSim document version 40000
Model WristModel:
  gravity: 0 -9.80665 0
  credits: Gonzalez, R.V., Buchanan, T.S., Delp, S.L.
  length_units: meters
  force_units: N
  publications:
    How muscle architecture and moment arms affect wrist flexion-extension moments. Journal of Biomechanics, vol. 30, pp. 705-712, 1997.
  Ground
  BodySet:
    Body humerus: mass=0 [kg] mass_center=(0 0 0) inertia=(0 0 0 0 0 0) meshes=humerus.vtp
    Body ulna: mass=0 mass_center=(0 0 0) inertia=(0 0 0 0 0 0) meshes=ulna.vtp
    Body radius: mass=0 mass_center=(0 0 0) inertia=(0 0 0 0 0 0) meshes=radius.vtp
    Body rotaxis: mass=0 mass_center=(0 0 0) inertia=(0 0 0 0 0 0)
    Body auxprfem: mass=0 mass_center=(0 0 0) inertia=(0 0 0 0 0 0)
    Body auxprrud: mass=0 mass_center=(0 0 0) inertia=(0 0 0 0 0 0)
    Body auxdrfem: mass=0 mass_center=(0 0 0) inertia=(0 0 0 0 0 0)
    Body auxdrrud: mass=0 mass_center=(0 0 0) inertia=(0 0 0 0 0 0)
    Body scaphoid: mass=0 mass_center=(0 0 0) inertia=(0 0 0 0 0 0) meshes=r_scaph.vtp
    Body lunate: mass=0 mass_center=(0 0 0) inertia=(0 0 0 0 0 0) meshes=r_lun.vtp
    Body trapezium: mass=0 mass_center=(0 0 0) inertia=(0 0 0 0 0 0) meshes=r_trpzm.vtp
    Body trapezoid: mass=0 mass_center=(0 0 0) inertia=(0 0 0 0 0 0) meshes=r_trpzd.vtp
    Body capitate: mass=0 mass_center=(0 0 0) inertia=(0 0 0 0 0 0) meshes=r_cap.vtp
    Body pisiform: mass=0 mass_center=(0 0 0) inertia=(0 0 0 0 0 0) meshes=r_pis.vtp
    Body triquetrum: mass=0 mass_center=(0 0 0) inertia=(0 0 0 0 0 0) meshes=r_triq.vtp
    Body hamate: mass=0 mass_center=(0 0 0) inertia=(0 0 0 0 0 0) meshes=r_ham.vtp
    Body carp_metacarp: mass=0 mass_center=(0 0 0) inertia=(0 0 0 0 0 0)
    Body metacarpal2: mass=0 mass_center=(0 0 0) inertia=(0 0 0 0 0 0) meshes=fingers1.vtp
    Body Iphalanx1: mass=0 mass_center=(0 0 0) inertia=(0 0 0 0 0 0) meshes=fingers2.vtp
    Body Iphalanx2: mass=0 mass_center=(0 0 0) inertia=(0 0 0 0 0 0) meshes=fingers3.vtp
    Body Iphalanx3: mass=0 mass_center=(0 0 0) inertia=(0 0 0 0 0 0) meshes=fingers4.vtp
    Body metacarpal3: mass=0 mass_center=(0 0 0) inertia=(0 0 0 0 0 0) meshes=fingers8.vtp
    Body Mphalanx1: mass=0 mass_center=(0 0 0) inertia=(0 0 0 0 0 0) meshes=movaxesfin76.stl
    Body Mphalanx2: mass=0 mass_center=(0 0 0) inertia=(0 0 0 0 0 0) meshes=movaxesfin623.stl
    Body Mphalanx3: mass=0 mass_center=(0 0 0) inertia=(0 0 0 0 0 0) meshes=movaxesfin515.stl
    Body metacarpal4: mass=0 mass_center=(0 0 0) inertia=(0 0 0 0 0 0) meshes=fingers12.vtp
    Body Rphalanx1: mass=0 mass_center=(0 0 0) inertia=(0 0 0 0 0 0) meshes=movaxesfin117.stl
    Body Rphalanx2: mass=0 mass_center=(0 0 0) inertia=(0 0 0 0 0 0) meshes=movaxesfin104.stl
    Body Rphalanx3: mass=0 mass_center=(0 0 0) inertia=(0 0 0 0 0 0) meshes=movaxesfin91.stl
    Body metacarpal5: mass=0 mass_center=(0 0 0) inertia=(0 0 0 0 0 0) meshes=fingers16.vtp
    Body Lphalanx1: mass=0 mass_center=(0 0 0) inertia=(0 0 0 0 0 0) meshes=movaxesfin158.stl
    Body Lphalanx2: mass=0 mass_center=(0 0 0) inertia=(0 0 0 0 0 0) meshes=movaxesfin143.stl
    Body Lphalanx3: mass=0 mass_center=(0 0 0) inertia=(0 0 0 0 0 0) meshes=movaxesfin133.stl
    Body thumb: mass=0 mass_center=(0 0 0) inertia=(0 0 0 0 0 0) meshes=fingers17.vtp
    Body Tphalanx1: mass=0 mass_center=(0 0 0) inertia=(0 0 0 0 0 0) meshes=fingers18mod61.vtp
    Body Tphalanx2: mass=0 mass_center=(0 0 0) inertia=(0 0 0 0 0 0) meshes=fingers19mod13-24.vtp
    Body imagine: mass=0 mass_center=(0 0 0) inertia=(0 0 0 0 0 0)
  JointSet:
    CustomJoint ground_humerus: socket_parent_frame=ground_offset socket_child_frame=humerus_offset
      Coordinate humerus_tilt: default_value=0 range=(-1.570796 1.570796) clamped=true
      Coordinate humerus_list: default_value=0 range=(-1.570796 1.570796) clamped=true
      Coordinate humerus_rotation: default_value=0 range=(-1.570796 1.570796) clamped=true
      Coordinate humerus_tx: default_value=0 range=(-5 5) clamped=true
      Coordinate humerus_ty: default_value=0.94 range=(-1 2) clamped=true
      Coordinate humerus_tz: default_value=0 range=(-3 3) clamped=true
      PhysicalOffsetFrame ground_offset: socket_parent=/ground translation=(0 0 0) [meters]
      PhysicalOffsetFrame humerus_offset: socket_parent=/bodyset/humerus translation=(0 0 0)
      SpatialTransform:
        TransformAxis rotation1: coordinates=humerus_tilt axis=(0 0 1) LinearFunction(coefficients=1 0)
        TransformAxis rotation2: coordinates=humerus_list axis=(1 0 0) LinearFunction(coefficients=1 0)
        TransformAxis rotation3: coordinates=humerus_rotation axis=(0 1 0) LinearFunction(coefficients=1 0)
        TransformAxis translation1: coordinates=humerus_tx axis=(1 0 0) LinearFunction(coefficients=1 0)
        TransformAxis translation2: coordinates=humerus_ty axis=(0 1 0) LinearFunction(coefficients=1 0)
        TransformAxis translation3: coordinates=humerus_tz axis=(0 0 1) LinearFunction(coefficients=1 0)
    CustomJoint elbow: socket_parent_frame=humerus_offset socket_child_frame=ulna_offset
      Coordinate elbow_flexion: default_value=0 range=(0 2.268928) clamped=false
      PhysicalOffsetFrame humerus_offset: socket_parent=/bodyset/humerus translation=(0.0127 -0.274 0.0389)
      PhysicalOffsetFrame ulna_offset: socket_parent=/bodyset/ulna translation=(0 0 0)
      SpatialTransform: axes_held_at_zero=(rotation2 rotation3 translation1 translation2 translation3)
        TransformAxis rotation1: coordinates=elbow_flexion axis=(0.2260469 0.1910399 0.9551997)
            LinearFunction(coefficients=1 0)
    CustomJoint radioulnar: socket_parent_frame=ulna_offset socket_child_frame=radius_offset
      Coordinate pro_sup: default_value=0 range=(-1.570796 1.570796) clamped=false
      PhysicalOffsetFrame ulna_offset: socket_parent=/bodyset/ulna translation=(-0.0065 -0.008 0.027)
      PhysicalOffsetFrame radius_offset: socket_parent=/bodyset/radius translation=(0 0 0)
      SpatialTransform: axes_held_at_zero=(rotation1 rotation3 translation1 translation2 translation3)
        TransformAxis rotation2: coordinates=pro_sup axis=(0.05639802 0.9835774 -0.1714491)
            LinearFunction(coefficients=1 0)
    WeldJoint rad-rotaxis: socket_parent_frame=radius_offset socket_child_frame=rotaxis_offset
      PhysicalOffsetFrame radius_offset: socket_parent=/bodyset/radius translation=(-0.0085 -0.2313 0.0561)
          orientation=(-0.261799 0.392699 0) [radians]
      PhysicalOffsetFrame rotaxis_offset: socket_parent=/bodyset/rotaxis translation=(0 0 0)
    CustomJoint rotaxis-auxprfem: socket_parent_frame=rotaxis_offset socket_child_frame=auxprfem_offset
      Coordinate rotaxis_auxprfem_r3: default_value=0 range=(-99999.9 99999.9) clamped=false
      PhysicalOffsetFrame rotaxis_offset: socket_parent=/bodyset/rotaxis translation=(-0.001 0.009 0)
      PhysicalOffsetFrame auxprfem_offset: socket_parent=/bodyset/auxprfem translation=(0 0 0)
      SpatialTransform: axes_held_at_zero=(rotation1 rotation2 translation1 translation2 translation3)
        TransformAxis rotation3: coordinates=rotaxis_auxprfem_r3 axis=(0 0 1) LinearFunction(coefficients=1 0)
    CustomJoint auxprfem-auxprrud: socket_parent_frame=auxprfem_offset socket_child_frame=auxprrud_offset
      Coordinate deviation: default_value=0 range=(-0.4363323 0.6108652) clamped=false
      PhysicalOffsetFrame auxprfem_offset: socket_parent=/bodyset/auxprfem translation=(0 0 0)
      PhysicalOffsetFrame auxprrud_offset: socket_parent=/bodyset/auxprrud translation=(0 0 0)
      SpatialTransform: axes_held_at_zero=(rotation2 rotation3 translation1 translation2 translation3)
        TransformAxis rotation1: coordinates=deviation axis=(1 0 0)
          SimmSpline: x=(-0.436332 0 0.610865) y=(-0.163625 0 0.305433)
    CustomJoint auxprrud-auxdrfem: socket_parent_frame=auxprrud_offset socket_child_frame=auxdrfem_offset
      Coordinate auxprrud_auxdrfem_r3: default_value=0 range=(-99999.9 99999.9) clamped=false
      PhysicalOffsetFrame auxprrud_offset: socket_parent=/bodyset/auxprrud translation=(0.001 -0.02 0)
      PhysicalOffsetFrame auxdrfem_offset: socket_parent=/bodyset/auxdrfem translation=(0 0 0)
      SpatialTransform: axes_held_at_zero=(rotation1 rotation2 translation1 translation2 translation3)
        TransformAxis rotation3: coordinates=auxprrud_auxdrfem_r3 axis=(0 0 1) LinearFunction(coefficients=1 0)
    CustomJoint auxdrfem-auxdrrud: socket_parent_frame=auxdrfem_offset socket_child_frame=auxdrrud_offset
      Coordinate auxdrfem_auxdrrud_r1: default_value=0 range=(-99999.9 99999.9) clamped=false
      PhysicalOffsetFrame auxdrfem_offset: socket_parent=/bodyset/auxdrfem translation=(0 0 0)
      PhysicalOffsetFrame auxdrrud_offset: socket_parent=/bodyset/auxdrrud translation=(0 0 0)
      SpatialTransform: axes_held_at_zero=(rotation2 rotation3 translation1 translation2 translation3)
        TransformAxis rotation1: coordinates=auxdrfem_auxdrrud_r1 axis=(1 0 0) LinearFunction(coefficients=1 0)
    WeldJoint prox-scaph: socket_parent_frame=auxprrud_offset socket_child_frame=scaphoid_offset
      PhysicalOffsetFrame auxprrud_offset: socket_parent=/bodyset/auxprrud translation=(-0.0035 -0.0025 0.009)
          orientation=(0.401426 0 0)
      PhysicalOffsetFrame scaphoid_offset: socket_parent=/bodyset/scaphoid translation=(0 0 0)
    WeldJoint prox-lun: socket_parent_frame=auxprrud_offset socket_child_frame=lunate_offset
      PhysicalOffsetFrame auxprrud_offset: socket_parent=/bodyset/auxprrud translation=(-0.004 -0.0015 -0.007)
      PhysicalOffsetFrame lunate_offset: socket_parent=/bodyset/lunate translation=(0 0 0)
    WeldJoint dist-trpzm: socket_parent_frame=auxdrrud_offset socket_child_frame=trapezium_offset
      PhysicalOffsetFrame auxdrrud_offset: socket_parent=/bodyset/auxdrrud translation=(0.0035 -0.0035 0.02)
          orientation=(-0.261799 0 0)
      PhysicalOffsetFrame trapezium_offset: socket_parent=/bodyset/trapezium translation=(0 0 0)
    WeldJoint dist-trpzd: socket_parent_frame=auxdrrud_offset socket_child_frame=trapezoid_offset
      PhysicalOffsetFrame auxdrrud_offset: socket_parent=/bodyset/auxdrrud translation=(-0.0015 -0.0044 0.0134)
          orientation=(0.349066 -0.174533 0)
      PhysicalOffsetFrame trapezoid_offset: socket_parent=/bodyset/trapezoid translation=(0 0 0)
    WeldJoint dist-cap: socket_parent_frame=auxdrrud_offset socket_child_frame=capitate_offset
      PhysicalOffsetFrame auxdrrud_offset: socket_parent=/bodyset/auxdrrud translation=(-0.0155 -0.0018 -0.0055)
          orientation=(0.174533 0 0)
      PhysicalOffsetFrame capitate_offset: socket_parent=/bodyset/capitate translation=(0 0 0)
    WeldJoint prox-pis: socket_parent_frame=auxprrud_offset socket_child_frame=pisiform_offset
      PhysicalOffsetFrame auxprrud_offset: socket_parent=/bodyset/auxprrud translation=(0.005 -0.015 -0.0201)
      PhysicalOffsetFrame pisiform_offset: socket_parent=/bodyset/pisiform translation=(0 0 0)
    WeldJoint prox-triq: socket_parent_frame=auxprrud_offset socket_child_frame=triquetrum_offset
      PhysicalOffsetFrame auxprrud_offset: socket_parent=/bodyset/auxprrud translation=(-0.0055 -0.01 -0.021)
      PhysicalOffsetFrame triquetrum_offset: socket_parent=/bodyset/triquetrum translation=(0 0 0)
    WeldJoint dist-ham: socket_parent_frame=auxdrrud_offset socket_child_frame=hamate_offset
      PhysicalOffsetFrame auxdrrud_offset: socket_parent=/bodyset/auxdrrud translation=(-0.006 -0.005 -0.0175)
          orientation=(-0.20944 0 0)
      PhysicalOffsetFrame hamate_offset: socket_parent=/bodyset/hamate translation=(0 0 0)
    WeldJoint auxCMC: socket_parent_frame=auxdrrud_offset socket_child_frame=carp_metacarp_offset
      PhysicalOffsetFrame auxdrrud_offset: socket_parent=/bodyset/auxdrrud translation=(0 0 0)
      PhysicalOffsetFrame carp_metacarp_offset: socket_parent=/bodyset/carp_metacarp translation=(0 0 0)
    WeldJoint CMC2: socket_parent_frame=carp_metacarp_offset socket_child_frame=metacarpal2_offset
      PhysicalOffsetFrame carp_metacarp_offset: socket_parent=/bodyset/carp_metacarp
          translation=(-0.0047 -0.0095 -0.005) orientation=(0.174533 0.261799 0)
      PhysicalOffsetFrame metacarpal2_offset: socket_parent=/bodyset/metacarpal2 translation=(0 0 0)
    CustomJoint MCP2: socket_parent_frame=metacarpal2_offset socket_child_frame=Iphalanx1_offset
      Coordinate MCP2_lateral: default_value=0 range=(-0.3490659 0.3490659) clamped=false
      Coordinate MCP2_flex: default_value=0 range=(-0.1745329 1.570796) clamped=false
      PhysicalOffsetFrame metacarpal2_offset: socket_parent=/bodyset/metacarpal2 translation=(-0.002402 -0.0685 0.045)
      PhysicalOffsetFrame Iphalanx1_offset: socket_parent=/bodyset/Iphalanx1 translation=(0 0 0)
      SpatialTransform: axes_held_at_zero=(rotation2 translation1 translation2 translation3)
        TransformAxis rotation1: coordinates=MCP2_lateral axis=(1 0 0) LinearFunction(coefficients=1 0)
        TransformAxis rotation3: coordinates=MCP2_flex axis=(0 0 1) LinearFunction(coefficients=1 0)
    CustomJoint PIP: socket_parent_frame=Iphalanx1_offset socket_child_frame=Iphalanx2_offset
      Coordinate PIP_flex: default_value=0 range=(-0.08726646 1.570796) clamped=false
      PhysicalOffsetFrame Iphalanx1_offset: socket_parent=/bodyset/Iphalanx1 translation=(0.0005 -0.04826 0.00799)
      PhysicalOffsetFrame Iphalanx2_offset: socket_parent=/bodyset/Iphalanx2 translation=(0 0 0)
      SpatialTransform: axes_held_at_zero=(rotation1 rotation2 translation1 translation2 translation3)
        TransformAxis rotation3: coordinates=PIP_flex axis=(0 0 1) LinearFunction(coefficients=1 0)
    CustomJoint DIP: socket_parent_frame=Iphalanx2_offset socket_child_frame=Iphalanx3_offset
      Coordinate DIP_flex: default_value=0 range=(-0.08726646 1.570796) clamped=false
      PhysicalOffsetFrame Iphalanx2_offset: socket_parent=/bodyset/Iphalanx2 translation=(0.00193 -0.03277 0.00472)
      PhysicalOffsetFrame Iphalanx3_offset: socket_parent=/bodyset/Iphalanx3 translation=(0 0 0)
      SpatialTransform: axes_held_at_zero=(rotation1 rotation2 translation1 translation2 translation3)
        TransformAxis rotation3: coordinates=DIP_flex axis=(0 0 1) LinearFunction(coefficients=1 0)
    WeldJoint CMC3: socket_parent_frame=carp_metacarp_offset socket_child_frame=metacarpal3_offset
      PhysicalOffsetFrame carp_metacarp_offset: socket_parent=/bodyset/carp_metacarp
          translation=(-0.0047 -0.0085 -0.005) orientation=(0.0872665 0.174533 0.0872665)
      PhysicalOffsetFrame metacarpal3_offset: socket_parent=/bodyset/metacarpal3 translation=(0 0 0)
    CustomJoint MCP2M: socket_parent_frame=metacarpal3_offset socket_child_frame=Mphalanx1_offset
      Coordinate MCP2M_lateral: default_value=0 range=(-0.3490659 0.3490659) clamped=false
      Coordinate MCP2M_flex: default_value=0 range=(-0.1745329 1.570796) clamped=false
      PhysicalOffsetFrame metacarpal3_offset: socket_parent=/bodyset/metacarpal3 translation=(-0.005 -0.0785 0.0109)
      PhysicalOffsetFrame Mphalanx1_offset: socket_parent=/bodyset/Mphalanx1 translation=(0 0 0)
      SpatialTransform: axes_held_at_zero=(rotation2 translation1 translation2 translation3)
        TransformAxis rotation1: coordinates=MCP2M_lateral axis=(1 0 0) LinearFunction(coefficients=1 0)
        TransformAxis rotation3: coordinates=MCP2M_flex axis=(0 0 1) LinearFunction(coefficients=1 0)
    CustomJoint MPIP: socket_parent_frame=Mphalanx1_offset socket_child_frame=Mphalanx2_offset
      Coordinate MPIP_flex: default_value=0 range=(-0.08726646 1.570796) clamped=false
      PhysicalOffsetFrame Mphalanx1_offset: socket_parent=/bodyset/Mphalanx1 translation=(-0.0002 -0.0559 0.007)
      PhysicalOffsetFrame Mphalanx2_offset: socket_parent=/bodyset/Mphalanx2 translation=(0 0 0)
      SpatialTransform: axes_held_at_zero=(rotation1 rotation2 translation1 translation2 translation3)
        TransformAxis rotation3: coordinates=MPIP_flex axis=(0 0 1) LinearFunction(coefficients=1 0)
    CustomJoint MDIP: socket_parent_frame=Mphalanx2_offset socket_child_frame=Mphalanx3_offset
      Coordinate MDIP_flex: default_value=0 range=(-0.08726646 1.570796) clamped=false
      PhysicalOffsetFrame Mphalanx2_offset: socket_parent=/bodyset/Mphalanx2 translation=(0.00243 -0.03397 0.0018)
      PhysicalOffsetFrame Mphalanx3_offset: socket_parent=/bodyset/Mphalanx3 translation=(0 0 0)
      SpatialTransform: axes_held_at_zero=(rotation1 rotation2 translation1 translation2 translation3)
        TransformAxis rotation3: coordinates=MDIP_flex axis=(0 0 1) LinearFunction(coefficients=1 0)
    WeldJoint CMC4: socket_parent_frame=carp_metacarp_offset socket_child_frame=metacarpal4_offset
      PhysicalOffsetFrame carp_metacarp_offset: socket_parent=/bodyset/carp_metacarp
          translation=(-0.0047 -0.008 -0.0033) orientation=(0.0872665 0.174533 0.0872665)
      PhysicalOffsetFrame metacarpal4_offset: socket_parent=/bodyset/metacarpal4 translation=(0 0 0)
    CustomJoint RCP2M: socket_parent_frame=metacarpal4_offset socket_child_frame=Rphalanx1_offset
      Coordinate RCP2M_lateral: default_value=0 range=(-0.3490659 0.3490659) clamped=false
      Coordinate RCP2M_flex: default_value=0 range=(-0.1745329 1.570796) clamped=false
      PhysicalOffsetFrame metacarpal4_offset: socket_parent=/bodyset/metacarpal4 translation=(0 -0.077 -0.0109)
      PhysicalOffsetFrame Rphalanx1_offset: socket_parent=/bodyset/Rphalanx1 translation=(0 0 0)
      SpatialTransform: axes_held_at_zero=(rotation2 translation1 translation2 translation3)
        TransformAxis rotation1: coordinates=RCP2M_lateral axis=(1 0 0) LinearFunction(coefficients=1 0)
        TransformAxis rotation3: coordinates=RCP2M_flex axis=(0 0 1) LinearFunction(coefficients=1 0)
    CustomJoint RPIP: socket_parent_frame=Rphalanx1_offset socket_child_frame=Rphalanx2_offset
      Coordinate RPIP_flex: default_value=0 range=(-0.08726646 1.570796) clamped=false
      PhysicalOffsetFrame Rphalanx1_offset: socket_parent=/bodyset/Rphalanx1 translation=(0.003 -0.0559 0.01)
      PhysicalOffsetFrame Rphalanx2_offset: socket_parent=/bodyset/Rphalanx2 translation=(0 0 0)
      SpatialTransform: axes_held_at_zero=(rotation1 rotation2 translation1 translation2 translation3)
        TransformAxis rotation3: coordinates=RPIP_flex axis=(0 0 1) LinearFunction(coefficients=1 0)
    CustomJoint RDIP: socket_parent_frame=Rphalanx2_offset socket_child_frame=Rphalanx3_offset
      Coordinate RDIP_flex: default_value=0 range=(-0.08726646 1.570796) clamped=false
      PhysicalOffsetFrame Rphalanx2_offset: socket_parent=/bodyset/Rphalanx2 translation=(0.00593 -0.03357 -0.00092)
      PhysicalOffsetFrame Rphalanx3_offset: socket_parent=/bodyset/Rphalanx3 translation=(0 0 0)
      SpatialTransform: axes_held_at_zero=(rotation1 rotation2 translation1 translation2 translation3)
        TransformAxis rotation3: coordinates=RDIP_flex axis=(0 0 1) LinearFunction(coefficients=1 0)
    WeldJoint CMC5: socket_parent_frame=carp_metacarp_offset socket_child_frame=metacarpal5_offset
      PhysicalOffsetFrame carp_metacarp_offset: socket_parent=/bodyset/carp_metacarp translation=(-0.002 -0.01 0.0035)
          orientation=(0.0872665 0.174533 0.0872665)
      PhysicalOffsetFrame metacarpal5_offset: socket_parent=/bodyset/metacarpal5 translation=(0 0 0)
    CustomJoint LCP2M: socket_parent_frame=metacarpal5_offset socket_child_frame=Lphalanx1_offset
      Coordinate LCP2M_lateral: default_value=0 range=(-0.3490659 0.3490659) clamped=false
      Coordinate LCP2M_flex: default_value=0 range=(-0.1745329 1.570796) clamped=false
      PhysicalOffsetFrame metacarpal5_offset: socket_parent=/bodyset/metacarpal5 translation=(0.0015 -0.064 -0.0397)
      PhysicalOffsetFrame Lphalanx1_offset: socket_parent=/bodyset/Lphalanx1 translation=(0 0 0)
      SpatialTransform: axes_held_at_zero=(rotation2 translation1 translation2 translation3)
        TransformAxis rotation1: coordinates=LCP2M_lateral axis=(1 0 0) LinearFunction(coefficients=1 0)
        TransformAxis rotation3: coordinates=LCP2M_flex axis=(0 0 1) LinearFunction(coefficients=1 0)
    CustomJoint LPIP: socket_parent_frame=Lphalanx1_offset socket_child_frame=Lphalanx2_offset
      Coordinate LPIP_flex: default_value=0 range=(-0.08726646 1.570796) clamped=false
      PhysicalOffsetFrame Lphalanx1_offset: socket_parent=/bodyset/Lphalanx1 translation=(0.001 -0.043 -0.008)
      PhysicalOffsetFrame Lphalanx2_offset: socket_parent=/bodyset/Lphalanx2 translation=(0 0 0)
      SpatialTransform: axes_held_at_zero=(rotation1 rotation2 translation1 translation2 translation3)
        TransformAxis rotation3: coordinates=LPIP_flex axis=(0 0 1) LinearFunction(coefficients=1 0)
    CustomJoint LDIP: socket_parent_frame=Lphalanx2_offset socket_child_frame=Lphalanx3_offset
      Coordinate LDIP_flex: default_value=0 range=(-0.08726646 1.570796) clamped=false
      PhysicalOffsetFrame Lphalanx2_offset: socket_parent=/bodyset/Lphalanx2 translation=(0.002 -0.028 0.004)
      PhysicalOffsetFrame Lphalanx3_offset: socket_parent=/bodyset/Lphalanx3 translation=(0 0 0)
      SpatialTransform: axes_held_at_zero=(rotation1 rotation2 translation1 translation2 translation3)
        TransformAxis rotation3: coordinates=LDIP_flex axis=(0 0 1) LinearFunction(coefficients=1 0)
    CustomJoint CMC1: socket_parent_frame=carp_metacarp_offset socket_child_frame=thumb_offset
      Coordinate thumb_abd: default_value=0 range=(-0.7853982 0.2617994) clamped=false
      Coordinate thumb_flex: default_value=0 range=(-0.7853982 1.570796) clamped=false
      PhysicalOffsetFrame carp_metacarp_offset: socket_parent=/bodyset/carp_metacarp translation=(0.008 -0.0045 0.0219)
      PhysicalOffsetFrame thumb_offset: socket_parent=/bodyset/thumb translation=(0 0 0)
      SpatialTransform: axes_held_at_zero=(rotation3 translation1 translation2 translation3)
        TransformAxis rotation1: coordinates=thumb_abd axis=(1 0 0) LinearFunction(coefficients=1 0)
        TransformAxis rotation2: coordinates=thumb_flex axis=(0.05639802 0.9835774 -0.1714491)
            LinearFunction(coefficients=1 0)
    CustomJoint TCP2M: socket_parent_frame=thumb_offset socket_child_frame=Tphalanx1_offset
      Coordinate TCP2M_lateral: default_value=0 range=(-0.3490659 0.3490659) clamped=false
      Coordinate TCP2M_flex: default_value=0 range=(0 1.396263) clamped=false
      PhysicalOffsetFrame thumb_offset: socket_parent=/bodyset/thumb translation=(0.00267 -0.0305 0.04)
      PhysicalOffsetFrame Tphalanx1_offset: socket_parent=/bodyset/Tphalanx1 translation=(0 0 0)
      SpatialTransform: axes_held_at_zero=(translation1 translation2 translation3)
        TransformAxis rotation1: coordinates=TCP2M_lateral axis=(1 0 0) LinearFunction(coefficients=1 0)
        TransformAxis rotation2: axis=(0 1 0) LinearFunction(coefficients=1 0)
        TransformAxis rotation3: coordinates=TCP2M_flex axis=(0 0.5 0.5) LinearFunction(coefficients=1 0)
    CustomJoint TCP2M2_flex: socket_parent_frame=Tphalanx1_offset socket_child_frame=Tphalanx2_offset
      Coordinate TCP2M2_flex: default_value=0 range=(-0.08726646 1.570796) clamped=false
      PhysicalOffsetFrame Tphalanx1_offset: socket_parent=/bodyset/Tphalanx1 translation=(-0.015 -0.033 0.024)
      PhysicalOffsetFrame Tphalanx2_offset: socket_parent=/bodyset/Tphalanx2 translation=(0 0 0)
      SpatialTransform: axes_held_at_zero=(rotation1 rotation2 translation1 translation2 translation3)
        TransformAxis rotation3: coordinates=TCP2M2_flex axis=(0 0.5 0.5) LinearFunction(coefficients=1 0)
    CustomJoint updown: socket_parent_frame=rotaxis_offset socket_child_frame=imagine_offset
      Coordinate flexion: default_value=0 range=(-1.22173 1.22173) clamped=false
      PhysicalOffsetFrame rotaxis_offset: socket_parent=/bodyset/rotaxis translation=(0 0 0)
      PhysicalOffsetFrame imagine_offset: socket_parent=/bodyset/imagine translation=(0 0 0) orientation=(0 0 -1.5708)
      SpatialTransform: axes_held_at_zero=(rotation2 rotation3 translation1 translation2 translation3)
        TransformAxis rotation1: coordinates=flexion axis=(1 0 0)
          SimmSpline: x=(-1.5708 0 1.5708) y=(-0.01 0 0.01)
  MarkerSet:
    Marker Hand_Start: radius (-0.007888891 -0.2183006 0.0605412) fixed=true
    Marker Hand_Thumb3: Tphalanx1 (-0.01232309 -0.04115871 0.02236647) fixed=true
    Marker Hand_ThumbTip: Tphalanx2 (-0.00476197 -0.03422397 0.0122766) fixed=true
    Marker Hand_Index1: metacarpal2 (-0.003912876 -0.07630249 0.04404868) fixed=true
    Marker Hand_Thumb2: thumb (0.004341501 -0.04206419 0.0402541)
    Marker Hand_Ring2: Rphalanx1 (0.003142438 -0.06008199 0.004378501) fixed=true
    Marker Hand_Middle1: metacarpal3 (-0.004974643 -0.08395534 0.01441823) fixed=true
    Marker Hand_Pinky1: metacarpal5 (3.89163e-5 -0.06949306 -0.03664787) fixed=true
    Marker Hand_Index2: Iphalanx1 (0.001600166 -0.05465069 0.008290837) fixed=true
    Marker Hand_Index3: Iphalanx2 (0.0009978502 -0.03642282 0.003615753) fixed=true
    Marker Hand_IndexTip: Iphalanx3 (0.002097341 -0.02319192 0.003480245) fixed=true
    Marker Hand_Middle3: Mphalanx2 (0.004073992 -0.03843471 0.0065951) fixed=true
    Marker Hand_MiddleTip: Mphalanx3 (0.002637237 -0.02726816 0.006309925) fixed=true
    Marker Hand_Middle2: Mphalanx1 (0.001335462 -0.0597819 0.008055302) fixed=true
    Marker Hand_Ring3: Rphalanx2 (0.006638035 -0.03640424 -0.002044995) fixed=true
    Marker Hand_RingTip: Rphalanx3 (0.003081676 -0.02556288 0.001058819) fixed=true
    Marker Hand_Ring1: metacarpal4 (-0.002449906 -0.08559839 -0.007913776) fixed=true
    Marker Hand_Pinky2: Lphalanx1 (0.001909019 -0.04797333 0.001019529) fixed=true
    Marker Hand_PinkyTip: Lphalanx3 (-0.001311813 -0.02293506 0.007476949) fixed=true
    Marker Hand_Pinky3: Lphalanx2 (0.0008064064 -0.03101024 0.01001313) fixed=true
    Marker Hand_Thumb1: trapezium (-0.001042947 -0.001949986 0.002379972) fixed=true
