# OpenSim document version 40000
ScaleTool WristModel-scaled:
  mass: 2 [kg]
  height: -1
  age: -1
  ModelScaler:
    apply: true
    scaling_order: measurements
    marker_file: HandIKFakeMarkerFile.trc
    time_range: 0 0.2
    preserve_mass_distribution: false
    MeasurementSet:
      Measurement ThumbTip: apply=true
        MarkerPair: markers=(Hand_ThumbTip Hand_Thumb3)
        BodyScale Tphalanx2: axes=(X Y Z)
      Measurement Thumb1: apply=true
        MarkerPair: markers=(Hand_Thumb3 Hand_Thumb2)
        BodyScale Tphalanx1: axes=(X Y Z)
      Measurement Thumb2: apply=true
        MarkerPair: markers=(Hand_Thumb2 Hand_Thumb1)
        BodyScale thumb: axes=(X Y Z)
      Measurement IndexTip: apply=true
        MarkerPair: markers=(Hand_IndexTip Hand_Index3)
        BodyScale Iphalanx3: axes=(X Y Z)
      Measurement Index1: apply=true
        MarkerPair: markers=(Hand_Index3 Hand_Index2)
        BodyScale Iphalanx2: axes=(X Y Z)
      Measurement Index2: apply=true
        MarkerPair: markers=(Hand_Index2 Hand_Index1)
        BodyScale Iphalanx1: axes=(X Y Z)
      Measurement MiddleTip: apply=true
        MarkerPair: markers=(Hand_MiddleTip Hand_Middle3)
        BodyScale Mphalanx3: axes=(X Y Z)
      Measurement Middle1: apply=true
        MarkerPair: markers=(Hand_Middle3 Hand_Middle2)
        BodyScale Mphalanx2: axes=(X Y Z)
      Measurement Middle2: apply=true
        MarkerPair: markers=(Hand_Middle2 Hand_Middle1)
        BodyScale Mphalanx1: axes=(X Y Z)
      Measurement RingTip: apply=true
        MarkerPair: markers=(Hand_RingTip Hand_Ring3)
        BodyScale Rphalanx3: axes=(X Y Z)
      Measurement Ring1: apply=true
        MarkerPair: markers=(Hand_Ring3 Hand_Ring2)
        BodyScale Rphalanx2: axes=(X Y Z)
      Measurement Ring2: apply=true
        MarkerPair: markers=(Hand_Ring2 Hand_Ring1)
        BodyScale Rphalanx1: axes=(X Y Z)
      Measurement PinkyTip: apply=true
        MarkerPair: markers=(Hand_PinkyTip Hand_Pinky3)
        BodyScale Lphalanx3: axes=(X Y Z)
      Measurement Pinky1: apply=true
        MarkerPair: markers=(Hand_Pinky3 Hand_Pinky2)
        BodyScale Lphalanx2: axes=(X Y Z)
      Measurement PInky2: apply=true
        MarkerPair: markers=(Hand_Pinky2 Hand_Pinky1)
        BodyScale Lphalanx1: axes=(X Y Z)
      Measurement ThumbRoot: apply=true
        MarkerPair: markers=(Hand_Thumb1 Hand_Start)
        BodyScale scaphoid: axes=(X Y Z)
        BodyScale trapezium: axes=(X Y Z)
      Measurement IndexRoot: apply=true
        MarkerPair: markers=(Hand_Index1 Hand_Start)
        BodyScale metacarpal2: axes=(X Y Z)
      Measurement MiddleRoot: apply=true
        MarkerPair: markers=(Hand_Middle1 Hand_Start)
        BodyScale metacarpal3: axes=(X Y Z)
      Measurement RingRoot: apply=true
        MarkerPair: markers=(Hand_Ring1 Hand_Start)
        BodyScale metacarpal4: axes=(X Y Z)
      Measurement PinkyRoot: apply=true
        MarkerPair: markers=(Hand_Pinky1 Hand_Start)
        BodyScale metacarpal5: axes=(X Y Z)
  MarkerPlacer:
    apply: true
    marker_file: HandIKFakeMarkerFile.trc
    time_range: 0 0.2
    max_marker_movement: -1
    IKTaskSet:
      IKMarkerTask Hand_Start: apply=true weight=10
      IKMarkerTask Hand_Thumb3: apply=true weight=20
      IKMarkerTask Hand_ThumbTip: apply=true weight=20
      IKMarkerTask Hand_Index1: apply=true weight=20
      IKMarkerTask Hand_Thumb2: apply=true weight=20
      IKMarkerTask Hand_Ring2: apply=true weight=20
      IKMarkerTask Hand_Middle1: apply=true weight=20
      IKMarkerTask Hand_Pinky1: apply=true weight=20
      IKMarkerTask Hand_Index2: apply=true weight=20
      IKMarkerTask Hand_Index3: apply=true weight=20
      IKMarkerTask Hand_IndexTip: apply=true weight=20
      IKMarkerTask Hand_Middle3: apply=true weight=20
      IKMarkerTask Hand_MiddleTip: apply=true weight=20
      IKMarkerTask Hand_Middle2: apply=true weight=20
      IKMarkerTask Hand_Ring3: apply=true weight=20
      IKMarkerTask Hand_RingTip: apply=true weight=20
      IKMarkerTask Hand_Ring1: apply=true weight=20
      IKMarkerTask Hand_Pinky2: apply=true weight=20
      IKMarkerTask Hand_PinkyTip: apply=true weight=20
      IKMarkerTask Hand_Pinky3: apply=true weight=20
      IKMarkerTask Hand_Thumb1: apply=true weight=10
